<neuroml xmlns="http://www.neuroml.org/schema/neuroml2"  xmlns:xs="http://www.w3.org/2001/XMLSchema" xmlns:xsi="http://www.w3.org/2001/XMLSchema-instance" xsi:schemaLocation="http://www.neuroml.org/schema/neuroml2 https://raw.github.com/NeuroML/NeuroML2/development/Schemas/NeuroML2/NeuroML_v2.3.xsd" id="HL23Network">
    <include href="rotated_cells/HL23PYR_sim.cell.nml"/>
    <include href="rotated_cells/HL23SST_sim.cell.nml"/>
    <include href="rotated_cells/HL23PV_sim.cell.nml"/>
    <include href="rotated_cells/HL23VIP_sim.cell.nml"/>
    <network id="HL23Network" temperature="34.0 degC">
        <notes>L23 network at 0.01 scale</notes>
        <population id="HL23PYR_pop" component="HL23PYR_sim" type="populationList">
            <property tag="region" value="L23"/>
            <instance id="0">
                <location x="-221.223306399760617" y="84.192327970444907" z="-841.488627155949189"/>
            </instance>
            <instance id="1">
                <location x="186.711303919687111" y="-108.088098299224441" z="-842.085796297591742"/>
            </instance>
            <instance id="2">
                <location x="-171.332036406190724" y="174.281129262744628" z="-983.946214887313204"/>
            </instance>
            <instance id="3">
                <location x="-65.680911263546363" y="-235.799658273611328" z="-705.129130001679641"/>
            </instance>
            <instance id="4">
                <location x="193.859487156738453" y="-141.113442226513342" z="-1289.199460195959091"/>
            </instance>
            <instance id="5">
                <location x="29.567558509365654" y="103.017517718606726" z="-1206.155865497995592"/>
            </instance>
            <instance id="6">
                <location x="-71.604517751624186" y="37.946322703901245" z="-1367.531552376586433"/>
            </instance>
            <instance id="7">
                <location x="91.580909358024982" y="65.813723334521015" z="-620.4714273751772"/>
            </instance>
        </population>
        <population id="HL23SST_pop" component="HL23SST_sim" type="populationList">
            <property tag="region" value="L23"/>
            <instance id="0">
                <location x="106.350954605553099" y="-214.951800779721538" z="-645.5753185087774"/>
            </instance>
            <instance id="1">
                <location x="-206.462723262819111" y="-23.384348836400449" z="-675.156452413023658"/>
            </instance>
        </population>
        <population id="HL23PV_pop" component="HL23PV_sim" type="populationList">
            <property tag="region" value="L23"/>
            <instance id="0">
                <location x="-65.390056656730806" y="-116.993532553848922" z="-946.991073553129127"/>
            </instance>
            <instance id="1">
                <location x="110.372916240357171" y="-23.733806935129497" z="-918.42937440240803"/>
            </instance>
        </population>
        <population id="HL23VIP_pop" component="HL23VIP_sim" type="populationList">
            <property tag="region" value="L23"/>
            <instance id="0">
                <location x="155.238762493285833" y="108.47285030975101" z="-620.439995080828112"/>
            </instance>
            <instance id="1">
                <location x="118.727725395658069" y="115.43567054935167" z="-910.081605547348772"/>
            </instance>
        </population>
        <projection id="proj_HL23PYR_HL23PYR" presynapticPopulation="HL23PYR_pop" postsynapticPopulation="HL23PYR_pop" synapse="HL23PYR_HL23PYR_ProbAMPANMDA">
            <connectionWD id="0" preCellId="../HL23PYR_pop/7/HL23PYR_sim" postCellId="../HL23PYR_pop/0/HL23PYR_sim" postSegmentId="2731" postFractionAlong="0.414971335505089" weight="100.0" delay="0.5 ms"/>
            <connectionWD id="1" preCellId="../HL23PYR_pop/7/HL23PYR_sim" postCellId="../HL23PYR_pop/0/HL23PYR_sim" postSegmentId="5780" postFractionAlong="0.362606596747227" weight="100.0" delay="0.5 ms"/>
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        </projection>
        <projection id="proj_HL23PYR_HL23SST" presynapticPopulation="HL23PYR_pop" postsynapticPopulation="HL23SST_pop" synapse="HL23PYR_HL23SST_ProbAMPANMDA">
            <connectionWD id="0" preCellId="../HL23PYR_pop/5/HL23PYR_sim" postCellId="../HL23SST_pop/1/HL23SST_sim" postSegmentId="1421" postFractionAlong="0.073227554660103" weight="100.0" delay="0.5 ms"/>
            <connectionWD id="1" preCellId="../HL23PYR_pop/5/HL23PYR_sim" postCellId="../HL23SST_pop/1/HL23SST_sim" postSegmentId="1658" postFractionAlong="0.432673638403585" weight="100.0" delay="0.5 ms"/>
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        </projection>
        <projection id="proj_HL23PYR_HL23PV" presynapticPopulation="HL23PYR_pop" postsynapticPopulation="HL23PV_pop" synapse="HL23PYR_HL23PV_ProbAMPANMDA">
            <connectionWD id="0" preCellId="../HL23PYR_pop/6/HL23PYR_sim" postCellId="../HL23PV_pop/0/HL23PV_sim" postSegmentId="1757" postFractionAlong="0.203158424921183" weight="100.0" delay="0.5 ms"/>
            <connectionWD id="1" preCellId="../HL23PYR_pop/6/HL23PYR_sim" postCellId="../HL23PV_pop/0/HL23PV_sim" postSegmentId="2321" postFractionAlong="0.078219871106718" weight="100.0" delay="0.5 ms"/>
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        </projection>
        <projection id="proj_HL23SST_HL23PYR" presynapticPopulation="HL23SST_pop" postsynapticPopulation="HL23PYR_pop" synapse="HL23SST_HL23PYR_ProbUDFsyn">
            <connectionWD id="0" preCellId="../HL23SST_pop/1/HL23SST_sim" postCellId="../HL23PYR_pop/2/HL23PYR_sim" postSegmentId="5076" postFractionAlong="0.352501993911949" weight="100.0" delay="0.5 ms"/>
            <connectionWD id="1" preCellId="../HL23SST_pop/1/HL23SST_sim" postCellId="../HL23PYR_pop/2/HL23PYR_sim" postSegmentId="2806" postFractionAlong="0.821970407089754" weight="100.0" delay="0.5 ms"/>
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        </projection>
        <projection id="proj_HL23SST_HL23PV" presynapticPopulation="HL23SST_pop" postsynapticPopulation="HL23PV_pop" synapse="HL23SST_HL23PV_ProbUDFsyn">
            <connectionWD id="0" preCellId="../HL23SST_pop/0/HL23SST_sim" postCellId="../HL23PV_pop/0/HL23PV_sim" postSegmentId="3943" postFractionAlong="0.621795852458034" weight="100.0" delay="0.5 ms"/>
            <connectionWD id="1" preCellId="../HL23SST_pop/0/HL23SST_sim" postCellId="../HL23PV_pop/0/HL23PV_sim" postSegmentId="2267" postFractionAlong="0.396584022732885" weight="100.0" delay="0.5 ms"/>
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        </projection>
        <projection id="proj_HL23PV_HL23PYR" presynapticPopulation="HL23PV_pop" postsynapticPopulation="HL23PYR_pop" synapse="HL23PV_HL23PYR_ProbUDFsyn">
            <connectionWD id="0" preCellId="../HL23PV_pop/0/HL23PV_sim" postCellId="../HL23PYR_pop/6/HL23PYR_sim" postSegmentId="230" postFractionAlong="0.416086634724764" weight="100.0" delay="0.5 ms"/>
            <connectionWD id="1" preCellId="../HL23PV_pop/0/HL23PV_sim" postCellId="../HL23PYR_pop/6/HL23PYR_sim" postSegmentId="1417" postFractionAlong="0.88467065344297" weight="100.0" delay="0.5 ms"/>
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        </projection>
        <projection id="proj_HL23VIP_HL23SST" presynapticPopulation="HL23VIP_pop" postsynapticPopulation="HL23SST_pop" synapse="HL23VIP_HL23SST_ProbUDFsyn">
            <connectionWD id="0" preCellId="../HL23VIP_pop/1/HL23VIP_sim" postCellId="../HL23SST_pop/0/HL23SST_sim" postSegmentId="2610" postFractionAlong="0.860121736261316" weight="100.0" delay="0.5 ms"/>
            <connectionWD id="1" preCellId="../HL23VIP_pop/1/HL23VIP_sim" postCellId="../HL23SST_pop/0/HL23SST_sim" postSegmentId="1092" postFractionAlong="0.615406750957362" weight="100.0" delay="0.5 ms"/>
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        </projection>
        <projection id="proj_HL23VIP_HL23PV" presynapticPopulation="HL23VIP_pop" postsynapticPopulation="HL23PV_pop" synapse="HL23VIP_HL23PV_ProbUDFsyn">
            <connectionWD id="0" preCellId="../HL23VIP_pop/1/HL23VIP_sim" postCellId="../HL23PV_pop/0/HL23PV_sim" postSegmentId="3653" postFractionAlong="0.553542564252773" weight="100.0" delay="0.5 ms"/>
            <connectionWD id="1" preCellId="../HL23VIP_pop/1/HL23VIP_sim" postCellId="../HL23PV_pop/0/HL23PV_sim" postSegmentId="2893" postFractionAlong="0.480366081530362" weight="100.0" delay="0.5 ms"/>
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        </projection>
        <inputList id="Gfluct_0" population="HL23PYR_pop" component="Gfluct_HL23PYR_0_5">
            <input id="0" target="../HL23PYR_pop/0/HL23PYR_sim" destination="synapses" segmentId="905" fractionAlong="0.885114796445408"/>
            <input id="1" target="../HL23PYR_pop/1/HL23PYR_sim" destination="synapses" segmentId="905" fractionAlong="0.885114796445408"/>
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        </inputList>
        <inputList id="Gfluct_1" population="HL23PYR_pop" component="Gfluct_HL23PYR_0_1">
            <input id="144" target="../HL23PYR_pop/0/HL23PYR_sim" destination="synapses" segmentId="5626" fractionAlong="0.9431395536055"/>
            <input id="145" target="../HL23PYR_pop/1/HL23PYR_sim" destination="synapses" segmentId="5626" fractionAlong="0.9431395536055"/>
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        </inputList>
        <inputList id="Gfluct_2" population="HL23PYR_pop" component="Gfluct_HL23PYR_0_3">
            <input id="216" target="../HL23PYR_pop/0/HL23PYR_sim" destination="synapses" segmentId="2316" fractionAlong="0.982179433270446"/>
            <input id="217" target="../HL23PYR_pop/1/HL23PYR_sim" destination="synapses" segmentId="2316" fractionAlong="0.982179433270446"/>
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        </inputList>
        <inputList id="Gfluct_3" population="HL23PYR_pop" component="Gfluct_HL23PYR_0_7">
            <input id="304" target="../HL23PYR_pop/0/HL23PYR_sim" destination="synapses" segmentId="3938" fractionAlong="0.516208173623192"/>
            <input id="305" target="../HL23PYR_pop/1/HL23PYR_sim" destination="synapses" segmentId="3938" fractionAlong="0.516208173623192"/>
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        </inputList>
        <inputList id="Gfluct_4" population="HL23PYR_pop" component="Gfluct_HL23PYR_0_9">
            <input id="400" target="../HL23PYR_pop/0/HL23PYR_sim" destination="synapses" segmentId="2813" fractionAlong="0.971705983774493"/>
            <input id="401" target="../HL23PYR_pop/1/HL23PYR_sim" destination="synapses" segmentId="2813" fractionAlong="0.971705983774493"/>
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        </inputList>
        <inputList id="Gfluct_5" population="HL23SST_pop" component="Gfluct_HL23SST_0_5">
            <input id="456" target="../HL23SST_pop/0/HL23SST_sim" destination="synapses" segmentId="2955" fractionAlong="0.992363905920124"/>
            <input id="457" target="../HL23SST_pop/1/HL23SST_sim" destination="synapses" segmentId="2955" fractionAlong="0.992363905920124"/>
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        </inputList>
        <inputList id="Gfluct_6" population="HL23PV_pop" component="Gfluct_HL23PV_0_5">
            <input id="496" target="../HL23PV_pop/0/HL23PV_sim" destination="synapses" segmentId="1836" fractionAlong="0.991164515108885"/>
            <input id="497" target="../HL23PV_pop/1/HL23PV_sim" destination="synapses" segmentId="1836" fractionAlong="0.991164515108885"/>
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        </inputList>
        <inputList id="Gfluct_7" population="HL23VIP_pop" component="Gfluct_HL23VIP_0_5">
            <input id="518" target="../HL23VIP_pop/0/HL23VIP_sim" destination="synapses" segmentId="1218" fractionAlong="0.98143834656655"/>
            <input id="519" target="../HL23VIP_pop/1/HL23VIP_sim" destination="synapses" segmentId="1218" fractionAlong="0.98143834656655"/>
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        </inputList>
    </network>
</neuroml>
